*Heading
** Job name: Cylinder_3D_Buckle-UMAT Model name: Cylinder_3D_Buckle-UMAT
** Generated by: Abaqus/CAE 2021
*Preprint, echo=NO, model=NO, history=NO, contact=NO
**
** PARTS
**
*Part, name=Part-1
*Node
      1,           0.,         -33.,          50.
      2,           0.,  -33.0999985,          50.
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*Element, type=C3D20
 1,  48,  53, 201, 185,   1,   2,  25,  32, 444, 443, 442, 441, 445, 446, 447,
    448, 450, 449, 451, 452
 2, 185, 201, 202, 186,  32,  25,  26,  31, 442, 455, 454, 453, 447, 456, 457,
    458, 452, 451, 459, 460
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*Nset, nset=Set-1, generate
    1,  1500,     1
*Elset, elset=Set-1, generate
   1,  200,    1
** Section: Section-1
*Solid Section, elset=Set-1, material=Material-1
,
*End Part
**
**
** ASSEMBLY
**
*Assembly, name=Assembly
**
*Instance, name=Part-1-1, part=Part-1
*End Instance
**
*Node
      1,           0.,           0.,           0.
*Nset, nset=RP-1
 1,
*Nset, nset=SET-RP-1, instance=Part-1-1
    5,    6,    7,    8,   11,   12
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*Elset, elset=SET-RP-1, instance=Part-1-1
  21,  22,  23,  24,  25,  46
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*Nset, nset=Set-4, instance=Part-1-1
 3, 4
*Nset, nset=Set-5, instance=Part-1-1, generate
    1,  1500,     1
*Elset, elset=Set-5, instance=Part-1-1, generate
   1,  200,    1
*Nset, nset=Set-6, instance=Part-1-1, generate
    1,  1500,     1
*Elset, elset=Set-6, instance=Part-1-1, generate
   1,  200,    1
*Nset, nset=Set-RP-2, instance=Part-1-1
   17,   18,   19,   20,   21,   22
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*Elset, elset=Set-RP-2, instance=Part-1-1
  96,  97,  98,  99, 100, 121
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** Constraint: Constraint-1
*Equation
2
SET-RP-1, 3, 1.
RP-1, 3, -1.
*End Assembly
**
** MATERIALS
**
*Material, name=Material-1
*User Material, constants=2
208000., 0.3
**
** BOUNDARY CONDITIONS
**
** Name: BC-1 Type: Displacement/Rotation
*Boundary
SET-RP-1, 1, 1
SET-RP-1, 2, 2
** Name: BC-3 Type: Displacement/Rotation
*Boundary
Set-RP-2, 1, 1
Set-RP-2, 2, 2
Set-RP-2, 3, 3
** ----------------------------------------------------------------
**
** STEP: Step-1
**
*Step, name=Step-1, nlgeom=NO, perturbation
*Buckle
10, , 18, 3000
**
** BOUNDARY CONDITIONS
**
** Name: BC-1 Type: Displacement/Rotation
*Boundary, op=NEW, load case=1
SET-RP-1, 1, 1
SET-RP-1, 2, 2
*Boundary, op=NEW, load case=2
SET-RP-1, 1, 1
SET-RP-1, 2, 2
** Name: BC-3 Type: Displacement/Rotation
*Boundary, op=NEW, load case=1
Set-RP-2, 1, 1
Set-RP-2, 2, 2
Set-RP-2, 3, 3
*Boundary, op=NEW, load case=2
Set-RP-2, 1, 1
Set-RP-2, 2, 2
Set-RP-2, 3, 3
**
** LOADS
**
** Name: Load-1   Type: Concentrated force
*Cload
RP-1, 3, 1.
**
** OUTPUT REQUESTS
**
*Restart, write, frequency=0
**
** FIELD OUTPUT: F-Output-1
**
*Output, field
*Node Output
CF, RF, U
*Element Output, directions=YES
LE, PE, PEEQ, PEMAG, S
*Contact Output
CDISP, CSTRESS
*End Step
