*Heading
** Job name: Hot-UMAT Model name: Cylinder_3D_Isotrop_LSA-UMAT
** Generated by: Abaqus/CAE 2021
*Preprint, echo=NO, model=NO, history=NO, contact=NO
**
** PARTS
**
*Part, name=Part-1
*Node
      1,           0.,         -33.,          50.
      2,           0.,  -33.0999985,          50.
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*Element, type=C3D20
  1,   78,   88,  466,  385,    1,    2,   25,   42, 1684, 1683, 1682, 1681, 1685, 1686, 1687,
     1688, 1690, 1689, 1691, 1692
  2,  385,  466,  467,  386,   42,   25,   26,   41, 1682, 1695, 1694, 1693, 1687, 1696, 1697,
     1698, 1692, 1691, 1699, 1700
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*Nset, nset=Set-1, generate
    1,  5800,     1
*Elset, elset=Set-1, generate
   1,  800,    1
** Section: Section-1
*Solid Section, elset=Set-1, material=Material-1
,
*End Part
**
**
** ASSEMBLY
**
*Assembly, name=Assembly
**
*Instance, name=Part-1-1, part=Part-1
*End Instance
**
*Node
      1,           0.,           0.,           0.
*Nset, nset=RP-1
 1,
*Nset, nset=SET-RP-1, instance=Part-1-1
    5,    6,    7,    8,   11,   12
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*Elset, elset=SET-RP-1, instance=Part-1-1
  91,  92,  93,  94,  95,  96
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*Nset, nset=Set-4, instance=Part-1-1
 3, 4
*Nset, nset=Set-5, instance=Part-1-1, generate
    1,  5800,     1
*Elset, elset=Set-5, instance=Part-1-1, generate
   1,  800,    1
*Nset, nset=Set-6, instance=Part-1-1, generate
    1,  5800,     1
*Elset, elset=Set-6, instance=Part-1-1, generate
   1,  800,    1
*Nset, nset=Set-RP-2, instance=Part-1-1
   17,   18,   19,   20,   21,   22
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*Elset, elset=Set-RP-2, instance=Part-1-1
 391, 392, 393, 394, 395, 396
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** Constraint: Constraint-1
*Equation
2
SET-RP-1, 3, 1.
RP-1, 3, -1.
*End Assembly
**
** MATERIALS
**
*Material, name=Material-1
*User Material, constants=8
208000.,     0.3,     20., 150000.,     0.3,    500., 1.3e-05,      0.
**
** BOUNDARY CONDITIONS
**
** Name: BC-1 Type: Displacement/Rotation
*Boundary
SET-RP-1, 1, 1
SET-RP-1, 2, 2
** Name: BC-3 Type: Displacement/Rotation
*Boundary
Set-RP-2, 1, 1
Set-RP-2, 2, 2
Set-RP-2, 3, 3
** ----------------------------------------------------------------
**
** STEP: Step-1
**
*Step, name=Step-1, nlgeom=NO, inc=1000
*Static
0.1, 1., 1e-05, 0.1
**
** PREDEFINED FIELDS
**
** Name: Predefined Field-2   Type: Temperature
*Temperature
Set-6, 5000.
**
** OUTPUT REQUESTS
**
*Restart, write, frequency=0
**
** FIELD OUTPUT: F-Output-1
**
*Output, field
*Node Output
CF, NT, RF, U
*Element Output, directions=YES
LE, PE, PEEQ, PEMAG, S, SDV, TEMP
*Contact Output
CDISP, CSTRESS
**
** HISTORY OUTPUT: H-Output-2
**
*Output, history, variable=PRESELECT
*End Step
