*Heading
** Job name: Pipe_plane_strain_UMAT Model name: Pipe_plane_strain-UMAT
** Generated by: Abaqus/CAE 2021
*Preprint, echo=NO, model=NO, history=NO, contact=NO
**
** PARTS
**
*Part, name=Part-1
*Node
      1,           0.,          40.
      2,           0.,          50.
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*Element, type=CPE4
   1,    1,    7,  585,  234
   2,    7,    8,  586,  585
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*Nset, nset=Set-1, generate
    1,  3113,     1
*Elset, elset=Set-1, generate
    1,  2830,     1
** Section: Section-1
*Solid Section, elset=Set-1, material=Steel
,
*End Part
**
**
** ASSEMBLY
**
*Assembly, name=Assembly
**
*Instance, name=Part-1-1, part=Part-1
*End Instance
**
*Nset, nset=Set-1, instance=Part-1-1
 2,
*Nset, nset=Set-2, instance=Part-1-1
 4, 6
*End Assembly
**
** MATERIALS
**
*Material, name=Steel
*User Material, constants=2
208000., 0.3
** ----------------------------------------------------------------
**
** STEP: Step-1
**
*Step, name=Step-1, nlgeom=NO
*Static
1., 1., 1e-05, 1.
**
** BOUNDARY CONDITIONS
**
** Name: BC-1 Type: Displacement/Rotation
*Boundary
Set-2, 1, 1
Set-2, 2, 2
Set-2, 6, 6
**
** LOADS
**
** Name: Load-1   Type: Concentrated force
*Cload
Set-1, 2, -10.
**
** OUTPUT REQUESTS
**
*Restart, write, frequency=0
**
** FIELD OUTPUT: F-Output-1
**
*Output, field, variable=PRESELECT
**
** HISTORY OUTPUT: H-Output-1
**
*Output, history, variable=PRESELECT
*End Step
