*Heading
** Job name: Plate_plane_stress_UMAT Model name: Plate_plane_stress-UMAT
** Generated by: Abaqus/CAE 2021
*Preprint, echo=NO, model=NO, history=NO, contact=NO
**
** PARTS
**
*Part, name=Part-1
*Node
      1,          -2.,          10.
      2,          -4.,          10.
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*Element, type=CPS3
 1, 789, 908, 743
 2, 601, 588, 555
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*Element, type=CPS4
 13, 338, 839, 226,   1
 14,  77, 457, 489, 843
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*Nset, nset=Set-1, generate
   1,  956,    1
*Elset, elset=Set-1, generate
   1,  892,    1
** Section: Section-1
*Solid Section, elset=Set-1, material=Steel
,
*End Part
**
**
** ASSEMBLY
**
*Assembly, name=Assembly
**
*Instance, name=Part-1-1, part=Part-1
*End Instance
**
*Nset, nset=Set-1, instance=Part-1-1
  13,  14,  15,  16,  17,  18
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*Elset, elset=Set-1, instance=Part-1-1
  24,  26,  28,  58,  60,  67
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*Nset, nset=Set-2, instance=Part-1-1
  49,  50,  51,  52,  53, 277, 278, 279, 280, 281, 282
*Elset, elset=Set-2, instance=Part-1-1
 196, 199, 201, 389, 390, 391, 393, 394, 439, 441
*End Assembly
**
** MATERIALS
**
*Material, name=Steel
*User Material, constants=2
208000., 0.3
** ----------------------------------------------------------------
**
** STEP: Step-1
**
*Step, name=Step-1, nlgeom=NO
*Static
1., 1., 1e-05, 1.
**
** BOUNDARY CONDITIONS
**
** Name: BC-1 Type: Displacement/Rotation
*Boundary
Set-1, 1, 1
Set-1, 2, 2
Set-1, 6, 6
** Name: BC-2 Type: Displacement/Rotation
*Boundary
Set-2, 1, 1, 1.
**
** OUTPUT REQUESTS
**
*Restart, write, frequency=0
**
** FIELD OUTPUT: F-Output-1
**
*Output, field, variable=PRESELECT
**
** HISTORY OUTPUT: H-Output-1
**
*Output, history, variable=PRESELECT
*End Step
