*Heading
** Job name: Tensile_Steel-UMAT-ED Model name: Steel_Tensile_test-UMAT
** Generated by: Abaqus/CAE 2021
*Preprint, echo=NO, model=NO, history=NO, contact=NO
**
** PARTS
**
*Part, name=Part-1
*Node
      1,         12.5,        -32.5,           2.
      2,         12.5,        -57.5,           2.
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*Element, type=C3D20
  1,  101,  345,  489,  100,    1,   41,   64,    4, 1396, 1395, 1394, 1393, 1397, 1398, 1399,
     1400, 1402, 1401, 1403, 1404
  2,  345,  346,  490,  489,   41,   42,   63,   64, 1407, 1406, 1405, 1395, 1408, 1409, 1410,
     1398, 1401, 1411, 1412, 1403
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*Nset, nset=Set-1, generate
    1,  4720,     1
*Elset, elset=Set-1, generate
   1,  621,    1
** Section: Section-1
*Solid Section, elset=Set-1, controls=EC-1, material=Material-1
,
*End Part
**
**
** ASSEMBLY
**
*Assembly, name=Assembly
**
*Instance, name=Part-1-1, part=Part-1
*End Instance
**
*Node
      1,           0.,         57.5,           1.
*Nset, nset=Set-3, instance=Part-1-1
    1,    2,    3,    4,    5,    6
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*Elset, elset=Set-3, instance=Part-1-1, generate
   1,  169,    1
*Nset, nset=Set-4
 1,
*Nset, nset=Set-5, instance=Part-1-1
   13,   14,   15,   16,   17,   18
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*Elset, elset=Set-5, instance=Part-1-1, generate
 170,  338,    1
*Nset, nset=Set-6, instance=Part-1-1
   13,   14,   15,   16,   17,   18
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*Elset, elset=Set-6, instance=Part-1-1, generate
 170,  338,    1
*Nset, nset=Set-7, instance=Part-1-1
   13,   14,   15,   16,   17,   18
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*Elset, elset=Set-7, instance=Part-1-1, generate
 170,  338,    1
*Nset, nset=t_Set-1, instance=Part-1-1
   13,   16,   19,   20,   21,   22
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*Elset, elset=t_Set-1, instance=Part-1-1, generate
 170,  326,   13
*Nset, nset=_PickedSet7, internal
 1,
*End Assembly
**
** ELEMENT CONTROLS
**
*Section Controls, name=EC-1, ELEMENT DELETION=YES
1., 1., 1.
*Amplitude, name=Amp-1
             0.,              0.,            0.01,            0.25,            0.02,             0.5,            0.03,            0.75
           0.04,              1.,            0.05,            0.75,            0.06,             0.5,            0.07,            0.25
           0.08,              0.,            0.09,           -0.25,             0.1,            -0.5,            0.11,           -0.75
           0.12,             -1.,            0.13,           -0.75,            0.14,            -0.5,            0.15,           -0.25
           0.16,              0.,            0.17,            0.25,            0.18,             0.5,            0.19,            0.75
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             1.,            0.75
**
** MATERIALS
**
*Material, name=Material-1
*Depvar, delete=20
     20,
*User Material, constants=5
208000.,  0.3, 405.,2857., 605.
** ----------------------------------------------------------------
**
** STEP: Step-1
**
*Step, name=Step-1, nlgeom=YES, inc=300
*Static
0.01, 1., 1e-15, 0.01
**
** BOUNDARY CONDITIONS
**
** Name: BC-1 Type: Displacement/Rotation
*Boundary
Set-3, 1, 1
Set-3, 2, 2
Set-3, 3, 3
** Name: BC-3 Type: Displacement/Rotation
*Boundary
Set-6, 1, 1
Set-6, 3, 3
** Name: BC-4 Type: Displacement/Rotation
*Boundary
Set-7, 2, 2, 10.
**
** OUTPUT REQUESTS
**
*Restart, write, frequency=0
**
** FIELD OUTPUT: F-Output-1
**
*Output, field
*Node Output
CF, RF, U
*Element Output, directions=YES
LE, PE, PEEQ, PEMAG, S, SDV, STATUS
*Contact Output
CDISP, CSTRESS
**
** HISTORY OUTPUT: H-Output-1
**
*Output, history, variable=PRESELECT
*End Step
